# Worksheet setting: ORIGIN = 1
# [component: inputs [Section_No, Component, Project, Location, Component_part, Component_note]]
# [reference: 00 PROJ REFERENCE.xmcd]
Section_No ≡ 1.05
# NOTE: The notations for the variables used in the title block and in the conclusions are as follows:
# Section_No = Section number for use in the calculation set
# Component = Component being analyzed
# Component_part = Location of the component within the assembly (head bracket, sill bracket, vision glass, etc)
# Component_note = Additional notes regarding the component, usually the location of the component (typical, corner, etc)
# Component_end = General classification of the component (mullion, glass, transom, plate, etc)
# DELETE BRACES AS NEEDED.
Component ≡ "TYPICAL COLUMN CLADDING"
Component_part ≡ ""
# - Deflection Magnitudes
Component_note ≡ ""
# Stainless Steel Sheet
# Positive Wind Load
Component_end ≡ "Panel"
# [component: inputs Ref_p.pos]
Ref_p.pos ≡ "./99 FEA/01 PANEL/deplPos.jpeg"
Ref_p.neg ≡ "./99 FEA/01 PANEL/deplNeg.jpeg"
# Negative Wind Load
# [component: inputs Ref_p.neg]
# Steel Corrugated Stiffener
# Positive Wind Load
Ref_r.pos ≡ "./99 FEA/02 STIFFENER/deplPos.jpeg"
# [component: inputs Ref_r.pos]
Ref_r.neg ≡ "./99 FEA/02 STIFFENER/deplNeg.jpeg"
# Negative Wind Load
# [component: inputs Ref_r.neg]
